FINISH              ! 结束当前模块 xin
/CLEAR , START       ! 清除数据库，开始新的分析
!========== 定义参数 (Preprocessor) ==========
str = '%z%h=%h%T1=%T1%T2=%T2%'
! ===== 1. 设置工作目录和文件名 =====
/MKDIR, 'D:/result/z =%z% h=%h% T1=%T1% T2=%T2%'     ! 创建项目目录（如不存在）
/CWD,'D:/result/z =%z% h=%h% T1=%T1% T2=%T2%'        ! 设置工作目录
/FILNAME,str, 1     ! 设置文件名前缀
! ========== 前处理 (Preprocessor) ==========
/PREP7              ! 进入前处理器
! 1. 定义材料属性 (钢)
MP, EX, 1, 210000   ! 杨氏模量 (Pa)
MP, PRXY, 1, 0.3    ! 泊松比
MP, DENS, 1, 7.85e-9   ! 密度 (kg/m³)

! 2. 定义单元类型 (壳单元SHELL181)
ET, 1, SHELL181     ! 选择壳单元类型
KEYOPT, 1, 8, 2     ! 设置存储应力和应变
K , 1 , -2500.0 , 500.0 , 0
K , 2 , -2000.0 , 1000.0 , 0
K , 3 , 2000.0 , 1000.0 , 0
K , 4 , 2500.0 , 500.0 , 0
K , 5 , 2500.0 , -500.0 , 0
K , 6 , 2000.0 , -1000.0 , 0
K , 7 , -2000.0 , -1000.0 , 0
K , 8 , -2500.0 , -500.0 , 0
K , 9 , -2500.0 , 500.0 , 3000.0
K , 10 , -2000.0 , 1000.0 , 3000.0
K , 11 , 2000.0 , 1000.0 , 3000.0
K , 12 , 2500.0 , 500.0 , 3000.0
K , 13 , 2500.0 , -500.0 , 3000.0
K , 14 , 2000.0 , -1000.0 , 3000.0
K , 15 , -2000.0 , -1000.0 , 3000.0
K , 16 , -2500.0 , -500.0 , 3000.0
A ,9,10,2,1
A ,10,11,3,2
A ,11,12,4,3
A ,12,13,5,4
A ,13,14,6,5
A ,14,15,7,6
A ,15,16,8,7
A ,16,9,1,8
ASEL, ALL
! 创建新组件侧壁
CM, CEBI, AREA
ASEL, NONE
K , 17 , -2700.0 , 582.842712474619 , 0
K , 18 , -2082.842712474619 , 1200.0 , 0
K , 19 , 2082.842712474619 , 1200.0 , 0
K , 20 , 2700.0 , 582.842712474619 , 0
K , 21 , 2700.0 , -582.842712474619 , 0
K , 22 , 2082.842712474619 , -1200.0 , 0
K , 23 , -2082.842712474619 , -1200.0 , 0
K , 24 , -2700.0 , -582.842712474619 , 0
K , 25 , -2700.0 , 582.842712474619 , 3000.0
K , 26 , -2082.842712474619 , 1200.0 , 3000.0
K , 27 , 2082.842712474619 , 1200.0 , 3000.0
K , 28 , 2700.0 , 582.842712474619 , 3000.0
K , 29 , 2700.0 , -582.842712474619 , 3000.0
K , 30 , 2082.842712474619 , -1200.0 , 3000.0
K , 31 , -2082.842712474619 , -1200.0 , 3000.0
K , 32 , -2700.0 , -582.842712474619 , 3000.0
A , 1, 2, 3, 4, 5, 6, 7, 8
BOTTOM_AREA = _RETURN
A , 17,18,19,20,21,22,23,24
RIM_AREA = _RETURN
ASBA, RIM_AREA, BOTTOM_AREA
! 创建新组件箱底沿
CM, BOTTOM_RIM, AREA
ASEL, NONE
A , 16,15,14,13,12,11,10,9
UP_AREA = _RETURN
A , 32,31,30,29,28,27,26,25
UP_RIM_AREA = _RETURN
ASBA, UP_RIM_AREA, UP_AREA
! 创建新组件箱盖沿
CM, TOP_RIM, AREA
ASEL, NONE
K , 33 , 517.0 , 1000.0 , 3000.0
K , 34 , 517.0 , -1000.0 , 3000.0
K , 35 , 517.0 , -1000.0 , 3120.0
K , 36 , 517.0 , 1000.0 , 3120.0
K , 37 , 1017.0 , 1000.0 , 3000.0
K , 38 , 1017.0 , -1000.0 , 3000.0
K , 39 , 1017.0 , -1000.0 , 3120.0
K , 40 , 1017.0 , 1000.0 , 3120.0
K , 41 , -1300.0 , 1000.0 , 3000.0
K , 42 , -1100.0 , -1000.0 , 3000.0
K , 43 , -1100.0 , -1000.0 , 3120.0
K , 44 , -1300.0 , 1000.0 , 3120.0
K , 45 , -800.0 , 1000.0 , 3000.0
K , 46 , -600.0 , -1000.0 , 3000.0
K , 47 , -600.0 , -1000.0 , 3120.0
K , 48 , -800.0 , 1000.0 , 3120.0
K , 49 , -300.0 , 1000.0 , 3000.0
K , 50 , -100.0 , -1000.0 , 3000.0
K , 51 , -100.0 , -1000.0 , 3120.0
K , 52 , -300.0 , 1000.0 , 3120.0
A ,33,34,35,36
A ,37,38,39,40
A ,41,42,43,44
A ,45,46,47,48
A ,49,50,51,52
! 创建新组件箱盖加强筋
CM, XDJIAQIANGJIN, AREA
ASEL, NONE
K , 73 , -2500.0 , 500.0 , 3000.0
K , 74 , -2500.0 , -500.0 , 3000.0
K , 75 , -2000.0 , -1000.0 , 3000.0
K , 76 , -1100.0 , -1000.0 , 3000.0
K , 77 , -1300.0 , 1000.0 , 3000.0
K , 78 , -2000.0 , 1000.0 , 3000.0
K , 79 , 1017.0 , 1000.0 , 3000.0
K , 80 , 1017.0 , -1000.0 , 3000.0
K , 81 , 2000.0 , -1000.0 , 3000.0
K , 82 , 2500.0 , -500.0 , 3000.0
K , 83 , 2500.0 , 500.0 , 3000.0
K , 84 , 2000.0 , 1000.0 , 3000.0
A ,73,74,75,76,77,78
A ,79,80,81,82,83,84
K , 85 , -1300.0 , 1000.0 , 3000.0
K , 86 , -1100.0 , -1000.0 , 3000.0
K , 87 , -600.0 , -1000.0 , 3000.0
K , 88 , -800.0 , 1000.0 , 3000.0
K , 89 , -800.0 , 1000.0 , 3000.0
K , 90 , -600.0 , -1000.0 , 3000.0
K , 91 , -100.0 , -1000.0 , 3000.0
K , 92 , -300.0 , 1000.0 , 3000.0
K , 93 , -300.0 , 1000.0 , 3000.0
K , 94 , -100.0 , -1000.0 , 3000.0
K , 95 , 517.0 , -1000.0 , 3000.0
K , 96 , 517.0 , 1000.0 , 3000.0
K , 97 , 517.0 , 1000.0 , 3000.0
K , 98 , 517.0 , -1000.0 , 3000.0
K , 99 , 1017.0 , -1000.0 , 3000.0
K , 100 , 1017.0 , 1000.0 , 3000.0
A ,85,86,87,88
A ,89,90,91,92
A ,93,94,95,96
A ,97,98,99,100
! 创建新组件箱盖
CM, TOP, AREA
ASEL, NONE
